кВ ≡ kV
км ≡ km
Сим ≡ 1/ohm
Ом ≡ ohm
м ≡ m
В ≡ V
# Выбор уставки I|2бл|
# По току небаланса в нагрузочном режиме
k_отс := 1.3
k_в := 0.95
ε := 0.03
k_f := 0
Δf := 0.04
ΔΦ := 0.005
k_2..сети := 0.02
I_раб..max := 1000 A
I_2нб..расч := I_раб..max*sqrt((ε/3)^2 + (k_f*Δf)^2 + ΔΦ^2 + k_2..сети^2) = 22.9129 A
I_2бл := k_отс/k_в*I_2нб..расч = 31.3545 A
# Выбор уставки I|2от|
# Отстройка от уставки I|2бл|
k_отс := 2
k_отв := 1
I_2от := k_отс*k_отв*I_2бл = 62.7089 A
# Отстройка от емкостного тока линии
k_отс := 2
U_ном := 220*кВ
L_л := 172*км
b_1 := 2.71*10^-6*Сим/км
I_емк := U_ном/sqrt(3)*b_1*L_л = 59.2052 A
I_2от := k_отс*I_емк/3 = 39.4701 A
# Принимаем:
I_2от := 62.709 A
